// SBML level 3 version 2

model PK_Model_1065667()
  // model units - substance: substance, time: time, volume: volume, area: area, length: length, extent: substance

  // Compartments:
  compartment IV = 1;
  compartment central = 60;

  // Species:
  species Agi in IV = 20;
  species A1 in central = 0;

  // Parameters:
  k10 = 0.555 per_hr;
  ka = 0.8 per_hr;

  // Reactions:
  intravenous: Agi => A1; ka*Agi;
  elimination: A1 => ; k10*A1;

  // Unit definitions:
  unit length = metre;
  unit area = metre^2;
  unit time = second;
  unit hour = 3600 second;
  unit substance = mole;
  unit per_hr = 1 / (3600 second);
  unit volume = 1e-3 litre;
  unit ng_per_mL = 1e-9 gram / (1e-3 litre);
end
