// SBML level 3 version 2

model PK_Model_1065667()
  // model units - substance: substance, time: time, volume: volume, area: area, length: length, extent: substance

  // Compartments:
  compartment IV = 1;
  compartment central = 60;
  compartment peripheral = 45;
  compartment peripheral2 = 45;

  // Species:
  species Agi in IV = 20;
  species A1 in central = 0;
  species A2 in peripheral = 0;
  species A3 in peripheral2 = 0;

  // Parameters:
  k10 = 0.555 per_hr;
  ka = 0.8 per_hr;
  k12 = 0.898 per_hr;
  k21 = 0.634 per_hr;
  k13 = 0.358 per_hr;
  k31 = 0.574 per_hr;

  // Reactions:
  intravenous: Agi => A1; ka*Agi;
  Central_to_Peripheral: A1 => A2; k12*A1;
  Peripheral_to_Central: A2 => A1; k21*A2;
  elimination: A1 => ; k10*A1;
  Central_to_Peripheral2: A1 => A3; k13*A1;
  Peripheral2_to_Central: A3 => A1; k21*A3;

  // Unit definitions:
  unit length = metre;
  unit area = metre^2;
  unit time = second;
  unit hour = 3600 second;
  unit substance = mole;
  unit per_hr = 1 / (3600 second);
  unit volume = 1e-3 litre;
  unit ng_per_mL = 1e-9 gram / (1e-3 litre);
end
